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/batch
! ANSYS input file written by Workbench version 2024 R1
! File used for geometry attach: C:\Users\fmjam\Documents\coding\playground\pyansis\simple-plate-geometry.scdoc
/title,--Harmonic Response
/COM,/COM,     ANSYSMotion, 2024.1
/com,--- Data in consistent MKS units. See Solving Units in the help system for more information.
/units,MKS
/prep7
! Turn off shape checking because checks already performed inside WB mesher.
! See help system for more information.
SHPP,OFF,,NOWARN
etcon,set             ! allow ANSYS to choose best KEYOP's for 180x elements, resets any applicable keyopt to MAPDL defaults
/com,*********** Nodes for the whole assembly ***********
nblock,3,,2040
(1i9,3e20.9e3)
        1     0.000000000E+00     0.000000000E+00    -3.000000000E+00
        2     1.034482759E-01     0.000000000E+00    -3.000000000E+00
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-1
/com,*********** Elements for Body 1 "Building\TopFloor\TopFloor" ***********
et,1,181
keyo,1,1,0       ! bending and membrane stiffness
keyo,1,3,2
eblock,19,solid,,845
(19i9)
        1        1        1        1        0        0        0        0        4        0        1     1042     1047     1051     1051
        1        1        1        1        0        0        0        0        4        0        2     1072     1054     1827     1827
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-1
/com,*********** Elements for Body 2 "Building\GroundFloor\GroundFloor" ***********
et,2,181
keyo,2,1,0       ! bending and membrane stiffness
keyo,2,3,2
eblock,19,solid,,841
(19i9)
        2        2        2        2        0        0        0        0        4        0      846      257      259      263      270
        2        2        2        2        0        0        0        0        4        0      847      258      260      259      257
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-1
/com,*********** Elements for Body 3 "Beam (Rectangle)" ***********
et,3,188
keyo,3,3,2
eblock,19,solid,,7
(19i9)
        3        3        3        3        0        0        0        0        3        0     1687       30      233     1828
        3        3        3        3        0        0        0        0        3        0     1688      233      234     1829
        3        3        3        3        0        0        0        0        3        0     1689      234      235     1830
        3        3        3        3        0        0        0        0        3        0     1690      235      236     1831
        3        3        3        3        0        0        0        0        3        0     1691      236      237     1832
        3        3        3        3        0        0        0        0        3        0     1692      237      238     1833
        3        3        3        3        0        0        0        0        3        0     1693      238      146     1834
-1
/com,*********** Elements for Body 4 "Beam (Rectangle)" ***********
et,4,188
keyo,4,3,2
eblock,19,solid,,7
(19i9)
        4        4        4        4        0        0        0        0        3        0     1694       59      239     1835
        4        4        4        4        0        0        0        0        3        0     1695      239      240     1836
        4        4        4        4        0        0        0        0        3        0     1696      240      241     1837
        4        4        4        4        0        0        0        0        3        0     1697      241      242     1838
        4        4        4        4        0        0        0        0        3        0     1698      242      243     1839
        4        4        4        4        0        0        0        0        3        0     1699      243      244     1840
        4        4        4        4        0        0        0        0        3        0     1700      244      175     1841
-1
/com,*********** Elements for Body 5 "Beam (Rectangle)" ***********
et,5,188
keyo,5,3,2
eblock,19,solid,,7
(19i9)
        5        5        5        5        0        0        0        0        3        0     1701       88      245     1842
        5        5        5        5        0        0        0        0        3        0     1702      245      246     1843
        5        5        5        5        0        0        0        0        3        0     1703      246      247     1844
        5        5        5        5        0        0        0        0        3        0     1704      247      248     1845
        5        5        5        5        0        0        0        0        3        0     1705      248      249     1846
        5        5        5        5        0        0        0        0        3        0     1706      249      250     1847
        5        5        5        5        0        0        0        0        3        0     1707      250      117     1848
-1
/com,*********** Elements for Body 6 "Beam (Rectangle)" ***********
et,6,188
keyo,6,3,2
eblock,19,solid,,7
(19i9)
        6        6        6        6        0        0        0        0        3        0     1708        1      251     1849
        6        6        6        6        0        0        0        0        3        0     1709      251      252     1850
        6        6        6        6        0        0        0        0        3        0     1710      252      253     1851
        6        6        6        6        0        0        0        0        3        0     1711      253      254     1852
        6        6        6        6        0        0        0        0        3        0     1712      254      255     1853
        6        6        6        6        0        0        0        0        3        0     1713      255      256     1854
        6        6        6        6        0        0        0        0        3        0     1714      256      204     1855
-1
/com,*********** Send User Defined Coordinate System(s) ***********
csys,0
toffst,273.15,  ! Temperature offset from absolute zero
/com,*********** Set Reference Temperature ***********
tref,22.
/com,*********** Send Materials ***********
MP,DENS,1,7850,	! kg m^-3
MP,ALPX,1,1.2e-05,	! C^-1
MP,C,1,434,	! J kg^-1 C^-1
MP,KXX,1,60.5,	! W m^-1 C^-1
MP,RSVX,1,1.7e-07,	! kg m^3 A^-2 s^-3
MP,EX,1,200000000000,	! Pa
MP,NUXY,1,0.3,
MP,MURX,1,10000,

MP,DENS,2,7850,	! kg m^-3
MP,ALPX,2,1.2e-05,	! C^-1
MP,C,2,434,	! J kg^-1 C^-1
MP,KXX,2,60.5,	! W m^-1 C^-1
MP,RSVX,2,1.7e-07,	! kg m^3 A^-2 s^-3
MP,EX,2,200000000000,	! Pa
MP,NUXY,2,0.3,
MP,MURX,2,10000,

MP,DENS,3,7850,	! kg m^-3
MP,ALPX,3,1.2e-05,	! C^-1
MP,C,3,434,	! J kg^-1 C^-1
MP,KXX,3,60.5,	! W m^-1 C^-1
MP,RSVX,3,1.7e-07,	! kg m^3 A^-2 s^-3
MP,EX,3,200000000000,	! Pa
MP,NUXY,3,0.3,
MP,MURX,3,10000,

MP,DENS,4,7850,	! kg m^-3
MP,ALPX,4,1.2e-05,	! C^-1
MP,C,4,434,	! J kg^-1 C^-1
MP,KXX,4,60.5,	! W m^-1 C^-1
MP,RSVX,4,1.7e-07,	! kg m^3 A^-2 s^-3
MP,EX,4,200000000000,	! Pa
MP,NUXY,4,0.3,
MP,MURX,4,10000,

MP,DENS,5,7850,	! kg m^-3
MP,ALPX,5,1.2e-05,	! C^-1
MP,C,5,434,	! J kg^-1 C^-1
MP,KXX,5,60.5,	! W m^-1 C^-1
MP,RSVX,5,1.7e-07,	! kg m^3 A^-2 s^-3
MP,EX,5,200000000000,	! Pa
MP,NUXY,5,0.3,
MP,MURX,5,10000,

MP,DENS,6,7850,	! kg m^-3
MP,ALPX,6,1.2e-05,	! C^-1
MP,C,6,434,	! J kg^-1 C^-1
MP,KXX,6,60.5,	! W m^-1 C^-1
MP,RSVX,6,1.7e-07,	! kg m^3 A^-2 s^-3
MP,EX,6,200000000000,	! Pa
MP,NUXY,6,0.3,
MP,MURX,6,10000,

/com,*********** Send Sheet Properties ***********
sectype,1,shell
secdata,0.2
secoff,mid

sectype,2,shell
secdata,0.2
secoff,mid

/com,*********** Send Beam Properties ***********
SECTYPE,3,BEAM,RECT
SECDATA,1.e-002,1.e-002
secoffset,cent

SECTYPE,4,BEAM,RECT
SECDATA,1.e-002,1.e-002
secoffset,cent

SECTYPE,5,BEAM,RECT
SECDATA,1.e-002,1.e-002
secoffset,cent

SECTYPE,6,BEAM,RECT
SECDATA,1.e-002,1.e-002
secoffset,cent

!************************* Model Summary ********************
!Building\TopFloor\TopFloor,	Structural Steel 2,	matid,	1
!Building\GroundFloor\GroundFloor,	Structural Steel 2,	matid,	2
!Beam (Rectangle),	Structural Steel 2,	matid,	3
!Beam (Rectangle),	Structural Steel 2,	matid,	4
!Beam (Rectangle),	Structural Steel 2,	matid,	5
!Beam (Rectangle),	Structural Steel 2,	matid,	6
!************************* End Model Summary ********************
/com,*********** Send Named Selection as Node Component ***********
CMBLOCK,TOPFLOOR,NODE,      903
(8i10)
       117       118       119       120       121       122       123       124
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/com,*********** Define Force Using Surface Effect Elements ***********
local,12,0,0.,0.,0.,0.,0.,0.
csys,0
et,7,154
mat,7
eblock,10,,,841
(15i9)
     1715        7        7        7       12      257      259      263      270
     1716        7        7        7       12      258      260      259      257
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-1
esel,s,type,,7
keyop,7,2,1                ! Apply load in local coordinate system
keyop,7,7,1                ! Use original area so load is constant in large deformation
esel,all

*DIM,_loadvari50x,TABLE,1,1,1,FREQ, , , 0
! Frequency values
*TAXIS,_loadvari50x(1),1,1.
! Load values
_loadvari50x(1,1,1) = 0.


*DIM,_loadvari50xi,TABLE,1,1,1,FREQ, , , 0
! Frequency values
*TAXIS,_loadvari50xi(1),1,1.
! Load values
_loadvari50xi(1,1,1) = 0.


*DIM,_loadvari50y,TABLE,1,1,1,FREQ, , , 0
! Frequency values
*TAXIS,_loadvari50y(1),1,1.
! Load values
_loadvari50y(1,1,1) = 111.111111111111


*DIM,_loadvari50yi,TABLE,1,1,1,FREQ, , , 0
! Frequency values
*TAXIS,_loadvari50yi(1),1,1.
! Load values
_loadvari50yi(1,1,1) = 0.


*DIM,_loadvari50z,TABLE,1,1,1,FREQ, , , 0
! Frequency values
*TAXIS,_loadvari50z(1),1,1.
! Load values
_loadvari50z(1,1,1) = 0.


*DIM,_loadvari50zi,TABLE,1,1,1,FREQ, , , 0
! Frequency values
*TAXIS,_loadvari50zi(1),1,1.
! Load values
_loadvari50zi(1,1,1) = 0.


fini
/com,*********** Performing Modal Solve ***********
/solu
antype,2
modcontrol,on
thexpand,off     ! ignore thermal strains
mxpand,,,,yes,,no     ! expand element results for stress/strains, but not write them to file.mode
outres,erase
outres,all,none
outres,nsol,all
outres,eangl,all
outres,veng,all
outres,strs,all,
outres,epel,all,
outres,rsol,all
outres,cont,all,
esel,s,type,,3
esel,a,type,,4,6
cm,_elmisc,elem
esel,all
outres,misc,all,_elmisc
modopt,lanb,200,250.,2000.
fdele,all,all
sfdele,all,all
sfedele,all,all,all
acel,0,0,0                 ! zero out the acceleration
/com,*********** Setting and Solving Each Load Step ***********
esel,s,type,,7
nsle
sfe,all,2,pres,1,1
nsel,all
esel,all
solve
/com,**********************
/com *************** Write FE CONNECTORS *********
CEWRITE,file,ce,,INTE
fini
/com,*********** Performing MSUP Harmonic Solve ***********
/solu
antype,harm
hropt,msup
thexpand,off     ! ignore thermal strains
hrout,off
kbc,1
*DIM,_harmUserForcingFreqSteps,,1
_harmUserForcingFreqSteps(1) = 500
harfrq,500,1000,,,%_harmUserForcingFreqSteps%
nsub,5
fdele,all,all
sfdele,all,all
sfedele,all,all,all
acel,0,0,0                 ! zero out the acceleration
lvscale,0,1
/com,*********** Scaling Each Load Step for MSUP Solve ***********
lvscale,%_loadvari50y%,1
! *********** WB SOLVE COMMAND ***********
! check interactive state
*get,ANSINTER_,active,,int
*if,ANSINTER_,ne,0,then
/eof
*endif
solve

fini
! ------- MSUP EXPANSION PASS -------
/solu
expass,on
hrexp,all
outres,erase
outres,all,none
outres,nsol,all
outres,eangl,all
outres,veng,all
outres,strs,all,
outres,epel,all,
outres,rsol,all
outres,cont,all,
outres,misc,all,_elmisc
numexp,all,,,yes        ! expand results at all freq. and calculate requested result items
! *********** WB SOLVE COMMAND ***********
! check interactive state
*get,ANSINTER_,active,,int
*if,ANSINTER_,ne,0,then
/eof
*endif
solve
/com *************** Write FE CONNECTORS *********
CEWRITE,file,ce,,INTE
fini
/post1
fini
